Simulations: Version=6
  Memo To do
    Mass balance
    : - plant in a single zone compared to spread across two zones should transpire the same amount of water before stress sets
    in but be able to maintain longer because of access to more soil.
  DataStore
  Folder CheckMassBalanceWater
    Experiment NumZonesWater
      Factors
        Factor NumOfZones: Specifications=[DoRootsSingle].Script.Zone1Prop=0.0,0.1,0.25,0.5,1.0
      Simulation BaseWater
        Clock: StartDate=2000-01-01; EndDate=2000-03-31
        Weather: FileName=ForeverSpringNoRain.met
        SoilArbitrator
        Summary
        Zone Zone0: Area=1; Slope=0
          Folder Managers
            Manager DoRootsSingle
              Zone0Depth = 600
              Zone0Mass = 500
              Zone1Name = Zone1
              Zone1Prop = 0
              Zone2Name = Zone2
              Zone2Prop = 0
              Zone3Name = Zone3
              Zone3Prop = 0
```csharp
// Defoliates AgPasture on a regular rotation or one-off via a schedule
// currenty defoliates the amount specified by spreading evenly over the specified period

using System;
using System.Collections.Generic;
using System.Xml.Serialization;
using Models.Core;
using Models.PMF;
using APSIM.Shared.Utilities;

namespace Models
{
	[Serializable]
	public class Script : Model
	{
		// - Links to APSIM models
		[Link] Zone myZone;
		[Link] Clock Clock;
		[Link] ISummary summary = null;
		
		List<AgPasture.PastureSpecies> Pasture = new List<AgPasture.PastureSpecies>();
		
		// - Paramters for this manager
		[Description("Root depth in the plant's zone (mm): ")]  public double Zone0Depth { get; set; }
		[Description("Root mass  in the plant's zone (mm): ")]  public double Zone0Mass { get; set; }

		[Description("Name of the first zone: ")] public string Zone1Name { get; set; }
		[Description("Proportionate depth and mass in the first zone (-): ")]  public double Zone1Prop { get; set; }

		[Description("Name of the second zone: ")] public string Zone2Name { get; set; }
		[Description("Proportionate depth and mass in the first zone (-): ")]  public double Zone2Prop { get; set; }

		[Description("Name of the third zone: ")] public string Zone3Name { get; set; }
		[Description("Proportionate depth and mass in the first zone (-): ")]  public double Zone3Prop { get; set; }

		// - Outputs from this manager

		// - Internal variables

		[EventSubscribe("Commencing")]
		private void OnSimulationCommencing(object sender, EventArgs e)
		{
			int SpeciesNum = 0;
			foreach (AgPasture.PastureSpecies species in Apsim.Children(myZone, typeof(AgPasture.PastureSpecies)))
			{
				SpeciesNum += 1;
				if (SpeciesNum == 1)
				{
					//double test = species.RootWt;
					if (Zone1Prop > 0)
						species.AddZone(zoneName: Zone1Name, rootDepth: Zone1Prop * Zone0Depth, rootDM: Zone1Prop * Zone0Mass, specificRootLength: 100);
					if (Zone2Prop > 0)
						species.AddZone(zoneName: Zone1Name, rootDepth: Zone2Prop * Zone0Depth, rootDM: Zone2Prop * Zone0Mass, specificRootLength: 100);
					if (Zone3Prop > 0)
						species.AddZone(zoneName: Zone1Name, rootDepth: Zone3Prop * Zone0Depth, rootDM: Zone3Prop * Zone0Mass, specificRootLength: 100);
				}
			}

			//Pasture[1].AddZone(zoneName: "Zone1", rootDepth: 100, rootDM: 1000, specificRootLength: 100);
			//Pasture[1].AddZone(zoneName: "Zone2", rootDepth: 50, rootDM: 500, specificRootLength: 100);
		}
	}
}
```
            Manager CutRotationSingle
              CutRotationStartDate = 1900-07-01
              CutRotationEndDate = 2100-12-31
              CutInterval = 1
              IntervalType = FixedInterval
              DurationOfCut = 1
              RemoveAmountType = ResidualDM
              AmountGiven = 2250
              DMRemoveType = RemoveAll
              FractionN2Remove = 1
              ProportionN2Dung = 0
```csharp
// Defoliates AgPasture on a regular rotation or one-off via a schedule
// currenty defoliates the amount specified by spreading evenly over the specified period

using System;
using System.Collections.Generic;
using System.Xml.Serialization;
using Models.Core;
using Models.PMF;
using APSIM.Shared.Utilities;

namespace Models
{
	[Serializable]
	public class Script : Model
	{
		// - Links to APSIM models
		[Link] Zone myZone;
		[Link] Clock Clock;
		[Link] Fertiliser fertiliser;
		[Link] ISummary summary = null;
		
		List<AgPasture.PastureSpecies> Pasture = new List<AgPasture.PastureSpecies>();
		
		// - Paramters for this manager
		[Description("Date to begin the rotation: ")]
		public DateTime CutRotationStartDate { get; set; }

		[Description("Date to finish the rotation: ")]
		public DateTime CutRotationEndDate { get; set; }

		[Description("Rotation interval (days): ")]
		public int CutInterval { get; set; }

		[Description("How the interval is defined: ")]
		public rotationIntervalTypes IntervalType { get; set; }

		[Description("Duration of each event (days): ")]
		public int DurationOfCut { get; set; }

		[Description("What amount is being defined: ")]
		public removeAmountTypes RemoveAmountType { get; set; }

		[Description("Amount to use (kg/ha): ")]
		public double AmountGiven { get; set; }

		[Description("Fraction of DM that is removed from the field:")]
		public removeDMTypes DMRemoveType { get; set; }

		[Description("Fraction of N that is removed from the field (0-1):")]
		public double FractionN2Remove { get; set; }

		[Description("Proportion of N returned in dung (0-1):")]
		public double ProportionN2Dung { get; set; }

		// - Outputs from this manager
		[XmlIgnore][Units("g/m2")]// Description: Pasture DM defoliated today
		public double DefoliatedWt { get; set; }
		[XmlIgnore][Units("g/m2")]// Description: Pasture N defoliate today
		public double DefoliatedN { get; set; }
		[XmlIgnore][Units("g/m2")]// Description: Pasture DM harvested today
		public double HarvestedWt { get; set; }
		[XmlIgnore][Units("g/m2")]// Description: Pasture N harvested today
		public double HarvestedN { get; set; }
		[XmlIgnore][Units("g/m2")]// Description: Pasture DM removed from the field
		public double RemovedWt { get; set; }
		[XmlIgnore][Units("g/m2")]// Description: Pasture N removed from the field
		public double RemovedN { get; set; }
		[XmlIgnore][Units("g/m2")]// Description: Residue DM returned to the field
		public double ReturnedWt { get; set; }
		[XmlIgnore][Units("g/m2")]// Description: Residue N returned to the field
		public double ReturnedN { get; set; }
		[XmlIgnore][Units("g/m2")]// Description: Harvested N returned as dung (SurfaceOM)
		public double NReturnedInDung { get; set; }
		[XmlIgnore][Units("g/m2")]// Description: Harvested N returned as urine (urea)
		public double NReturnedInUrine { get; set; }
		[XmlIgnore][Units("day")]// Description: Number of days after last defoliation
		public int DaysAfterCut { get; set; }
		[XmlIgnore][Units("g/m2")]// Description: Total standing DM (Leaf + Stem/Sheath) before cut
		public double PreHarvestDM { get; set; }
		[XmlIgnore][Units("g/m2")]// Description: Total standing DM (Leaf + Stem/Sheath) after cut
		public double PostHarvestDM { get; set; }
		
		// - Internal variables
		// fraction of harvested Dm to actually remove from field
		private double fractionDM2Remove = 1.0;
		// flag whether defoliation is allowed
		private bool rotationAllowed = true;
		// number of days for each defoliation event
		private int cuttingDuration = 0;
		// counter for day within each defoliation
		private int daysCutting = 0;
		// type of interval (Fixed or target)
		private string intervalType;
		// total herbage to remove in g/m2 per day
		private double herbageToRemove;
		// type of DM amount (ResidualDM or DMToRemove)
		private string amountType;
		// auxiliary flag for defoliation
		private bool aCutHasHappened = false;

		// - Event to add residue or dung to surface OM
		public event BiomassRemovedDelegate BiomassRemoved;

		[EventSubscribe("Commencing")]
		private void OnSimulationCommencing(object sender, EventArgs e)
		{
			foreach (AgPasture.PastureSpecies species in Apsim.Children(myZone, typeof(AgPasture.PastureSpecies)))
			{
				Pasture.Add(species);
			}

			// reset variables
			DaysAfterCut = 0;
			resetVariables();
			cuttingDuration = DurationOfCut;
			
			// get the type of amount given
			if (RemoveAmountType == removeAmountTypes.ResidualDM)
				amountType = "SetResidueAmount";
			else
				amountType = "SetRemoveAmount";

			// get the type of amount given
			if (IntervalType == rotationIntervalTypes.FixedInterval)
				intervalType = "Fixed";
			else
				intervalType = "Target";

			// make sure that rotation start when startDate < simulationStartDay
			if ((Clock.Today > CutRotationStartDate) && (Clock.Today < CutRotationEndDate))
				CutRotationStartDate = Clock.Today;
		}
		
		[EventSubscribe("DoManagement")]
		private void OnDoManagement(object sender, EventArgs e)
		{
			if (rotationAllowed)
			{
				if (Clock.Today == CutRotationStartDate)
					DaysAfterCut = CutInterval;

				// Check whether we can defoliate
				if ((Clock.Today >= CutRotationStartDate) && (Clock.Today <= CutRotationEndDate) && (Pasture[0].IsAlive))
				{
					// Check whether we should start a defoliation
					if (DaysAfterCut >= (CutInterval - 1))
					{
						Graze(AmountGiven, amountType, DurationOfCut);
					}
				}
			}

			// Check whether we need to continue cutting
			if ((daysCutting > 0) && (daysCutting < cuttingDuration))
			{
				// reset outputs
				resetVariables();

				removeDM(herbageToRemove);
				returnExcreta();
				daysCutting += 1;
				if (daysCutting == cuttingDuration)
					PostHarvestDM = Pasture[0].StandingHerbageWt; //+ Pasture[1].StandingHerbageWt
			}

			// reset outputs
			if (daysCutting < 0)
			{
				resetVariables();
				daysCutting = 0;
			}
		}

		[EventSubscribe("DoManagementCalculations")]
		private void OnDoManagementCalculations(object sender, EventArgs e)
		{
			// Check whether a cutting has finished
			if (daysCutting == cuttingDuration)
			{
				aCutHasHappened = true;
				daysCutting = -1;
			}

			// Increase the counter for days after cutting
			if (aCutHasHappened && (daysCutting == 0))
				DaysAfterCut += 1;
		}

		public enum removeAmountTypes
		{
			/// <summary>Setting DM amount to remove</summary>
			DMToRemove,
			/// <summary>Setting residual DM amount</summary>
			ResidualDM
		}

		public enum rotationIntervalTypes
		{
			/// <summary>Setting a fixed interval</summary>
			FixedInterval,
			/// <summary>Setting a target (minimum) inteval</summary>
			TargetInterval
		}

		public enum removeDMTypes
		{
			/// <summary>Remove all DM</summary>
			RemoveAll,
			/// <summary>Remove no DM</summary>
			RemoveNone,
			/// <summary>Remove a fraction based on digestibility</summary>
			BasedOnDigestibility
		}

		// Resets the values of all outputs
		private void resetVariables()
		{
			DefoliatedWt = 0.0;
			DefoliatedN = 0.0;
			HarvestedWt = 0.0;
			HarvestedN = 0.0;
			RemovedWt = 0.0;
			RemovedN = 0.0;
			ReturnedWt = 0.0;
			ReturnedN = 0.0;
			NReturnedInDung = 0.0;
			NReturnedInUrine = 0.0;
		}

		// Description: Perform the basic calculations for defoliation
		public void Graze(double amountDM, string amountType, int duration)
		{
			// Get the existing plant amount
			PreHarvestDM = Pasture[0].StandingHerbageWt;  //+ Pasture[1].StandingHerbageWt
			
			// Check the amount to remove and print some info
			if ((amountType == "SetRemoveAmount") && (PreHarvestDM >= amountDM / duration))
			{
				summary.WriteMessage(this, "   Defoliating " + (10 * amountDM).ToString("#0.0") + "kg/ha over " + duration + " days");
				herbageToRemove = amountDM / duration;
			}
			else if ((amountType == "SetResidueAmount") && (PreHarvestDM >= amountDM))
			{
				summary.WriteMessage(this, "   Defoliating down to approximately " + (10 * amountDM).ToString("#0.0") + "kg/ha over " + duration + " days");
				herbageToRemove = (PreHarvestDM - amountDM) / duration;
			}
			else
			{
				summary.WriteMessage(this, "   Defoliation will not happend because there is not enough plant material");
				if (intervalType == "Fixed")
					DaysAfterCut = -duration;
				return;
			}

			cuttingDuration = duration;
			// Preform first defoliation
			removeDM(herbageToRemove);
			returnExcreta();
			daysCutting = 1;
			DaysAfterCut = 0;
			if (daysCutting == cuttingDuration)
				PostHarvestDM = Pasture[0].StandingHerbageWt;  //+ Pasture[1].StandingHerbageWt
		}

		// Do the DM removal
		private void removeDM(double removeAmount)
		{
			double existingWt = Pasture[0].HarvestableWt;  // + Pasture[1].HarvestableWt

			// Check whether we harvest anything
			if (existingWt >= removeAmount)
			{
				foreach (AgPasture.PastureSpecies species in Pasture)
				{
					double amountToRemove = removeAmount * species.HarvestableWt / existingWt;
					species.Graze(amount: amountToRemove, type: "SetRemoveAmount");
				}
				
				// get total harvested
				DefoliatedWt = Pasture[0].HarvestedWt;  // + Pasture[1].HarvestedWt
				DefoliatedN = Pasture[0].HarvestedN;  //+ Pasture[1].HarvestedN
				HarvestedWt = DefoliatedWt;
				HarvestedN = DefoliatedN;

				// get amounts actually removed from field and that to be returned (dung/urine)
				if (DMRemoveType == removeDMTypes.RemoveAll)
					fractionDM2Remove = 1.0;
				else if (DMRemoveType == removeDMTypes.RemoveNone)
					fractionDM2Remove = 0.0;
				else
				{
					fractionDM2Remove = Pasture[0].HarvestedDigestibility * Pasture[0].HarvestedWt;  //+ Pasture[1].HarvestedDigestibility * Pasture[1].HarvestedWt
					fractionDM2Remove /= removeAmount;
				}
				
				RemovedWt = HarvestedWt * fractionDM2Remove;
				RemovedN = HarvestedN * FractionN2Remove;
				ReturnedWt = HarvestedWt - RemovedWt;
				ReturnedN = HarvestedN - RemovedN;
				NReturnedInDung = ReturnedN * ProportionN2Dung;
				NReturnedInUrine = ReturnedN - NReturnedInDung;
			}
		}

		// Return dung and urine
		private void returnExcreta()
		{
			if ((ReturnedWt > 0.0) || (NReturnedInDung > 0.0))
			{
				PMF.BiomassRemovedType BiomassDung = new PMF.BiomassRemovedType();
				string[] type = new string[] { "RuminantDung_PastureFed" };
				float[] dltdm = new float[] { (Single)ReturnedWt };
				float[] dltn = new float[] { (Single)NReturnedInDung };
				float[] dltp = new float[] { 0 };
				float[] fraction = new float[] { 1 };     // fraction is always 1.0 here

				BiomassDung.crop_type = "RuminantDung_PastureFed";
				BiomassDung.dm_type = type;
				BiomassDung.dlt_crop_dm = dltdm;
				BiomassDung.dlt_dm_n = dltn;
				BiomassDung.dlt_dm_p = dltp;
				BiomassDung.fraction_to_residue = fraction;
				BiomassRemoved.Invoke(BiomassDung);
			}

			if (NReturnedInUrine > 0.0)
			{
				fertiliser.Apply(NReturnedInUrine * 10, Fertiliser.Types.UreaN, 1.0);
			}
		}
	}
}
```
            Manager AutomaticFertiliser
              AllowFertiliser = no
              Depth2SoilN = 500
              CriticalSoilN = 50
              FertNAmount = 25
              FertType = UreaN
              FertApplicationDepth = 1
              FertMinimumDays = 1
```csharp
using System;
using Models.Core;
using Models.PMF;
using Models.Soils;
using APSIM.Shared.Utilities;
using System.Xml.Serialization;

namespace Models
{
	[Serializable]
	public class Script : Model
	{
		[Link] Clock Clock;
		[Link] Fertiliser fertiliser;
		[Link] ISummary summary = null;
		[Link] Soil Soil;

		//User inputs from properties tab
		[Description("Turn ferliser applications on? ")]
		public yesnoType AllowFertiliser { get; set; }
		
		[Description("Depth to calculate available soil N (mm): ")]
		public double Depth2SoilN { get; set; }

		[Description("Minimum available N, triggers an application (kgN/ha): ")]
		public double CriticalSoilN { get; set; }

		[Description("Amount of N fertiliser for each application (kgN/ha): ")]
		public double FertNAmount { get; set; }

		[Description("Type of N fertiliser to apply: ")]
		public Fertiliser.Types FertType { get; set; }

		[Description("Depth at which to apply the fertiliser (mm): ")]
		public double FertApplicationDepth { get; set; }
	   
		[Description("Minimum period between applications (days): ")]
		public double FertMinimumDays { get; set; }
	   
		public enum yesnoType
		{
			/// <summary>a positive answer</summary>
			yes,
			/// <summary>a negative answer</summary>
			no
		}

		[XmlIgnore] public double TopMineralN { get; set; }
		
		private DateTime lastApplicationDate;
		private bool fertiliserIsAllowed;
		private int nLayers;

		[EventSubscribe("StartOfSimulation")]
		private void OnStartOfSimulation(object sender, EventArgs e)
		{
			fertiliserIsAllowed = (AllowFertiliser == yesnoType.yes);
			nLayers = Soil.SoilWater.Thickness.Length;
		}

		[EventSubscribe("DoManagement")]
		private void OnDoManagement(object sender, EventArgs e)
		{
			double daysSinceLastApplication = (Clock.Today - lastApplicationDate).TotalDays;
			
			// get the N stored in the soil
			double depthFromSurface = 0.0;
			double fracLayer = 0.0;
			TopMineralN = 0.0;
			for (int layer = 0; layer < nLayers; layer++)
			{
				fracLayer = Math.Min(1.0, (Depth2SoilN - depthFromSurface) / Soil.SoilWater.Thickness[layer]);
				TopMineralN += (Soil.SoilNitrogen.NO3[layer]
				+ Soil.SoilNitrogen.NH4[layer]
				+ Soil.SoilNitrogen.urea[layer])
				* fracLayer;
				depthFromSurface += Soil.SoilWater.Thickness[layer];
				if (depthFromSurface >= Depth2SoilN)
					layer = nLayers;
			}

			if (fertiliserIsAllowed && (daysSinceLastApplication >= FertMinimumDays) && (TopMineralN <= CriticalSoilN))
			{
				fertiliser.Apply(FertNAmount, FertType, FertApplicationDepth);
				lastApplicationDate = Clock.Today;
			}
		}
	}
}
```
            Manager AutomaticIrrigation
              allowIrrigation = no
              seasonStart = 15-Aug
              seasonEnd = 30-May
              seasonsAllocation = 10000
              triggerDeficit = 75
              targetDeficit = 99
              returndays = 1
              maximumAmount = 30
              depthPAWC = 300
```csharp
using System;
using Models.Core;
using Models.PMF;
using Models.Soils;
using System.Xml.Serialization;
using Models.PMF;
using APSIM.Shared.Utilities;

        
namespace Models
{
	[Serializable] 
	[System.Xml.Serialization.XmlInclude(typeof(Model))]
	public class Script : Model
	{
		//Communication to other modules
		[Link] ISummary summary = null;
		[Link] Irrigation Irrigation;
		[Link] Clock Clock;
		[Link] Soil Soil;
		[Link(IsOptional = true)] ICrop existingCrop;
	   
		//User inputs from properties tab
		[Description("Turn irrigation on?")]
		public answerType allowIrrigation { get; set; }
		[Description("Start of irrigation season (dd-MMM)")]
		public string seasonStart { get; set; }
		[Description("End of irrigation season (dd-MMM)")]
		public string seasonEnd { get; set; }
		[Description("Season allocation (mm)")]
		public double seasonsAllocation { get; set; }
		[Description("Deficit to trigger irrigation (% PAWC)")]
		public double triggerDeficit { get; set; }
		[Description("Deficit to stop irrigaton (% PAWC)")]
		public double targetDeficit { get; set; }
		[Description("Minimum days for irrigation to return")]
		public double returndays { get; set; }
		[Description("Maximum irrigation application (mm/day)")]
		public double maximumAmount { get; set; }
		[Description("Depth to calculate PAWC (mm)")]
		public double depthPAWC { get; set; }
	   
		public enum answerType
		{
			/// <summary>a positive answer</summary>
			yes,
			/// <summary>a negative answer</summary>
			no
		}

		//Class members
		[XmlIgnore] public double TopSWdeficit { get; set; }
		[XmlIgnore] public double TopSWC { get; set; }
		[XmlIgnore] public double DaysSinceIrrigation { get; set; }
		[XmlIgnore] public double AmountToApply { get; set; }
		[XmlIgnore] public double SeasonAppliedAmount { get; set; }
		
		private bool IrrigationIsAllowed { get; set; }
		private bool SeasonIsOpen { get; set; }
		private bool CropIsActive { get; set; }
		private bool IrrigatorIsAvailable { get; set; }
		private bool SoilIsDry { get; set; }

		private DateTime StartDate;
		private DateTime EndDate;
		private double TopDUL;
		private double TopLL;
		private int nLayers;
	
		//Calculate static soil variables
		[EventSubscribe("StartOfSimulation")]
		private void OnStartOfSimulation(object sender, EventArgs e)
		{   
			//Set the season dates
			StartDate = DateTime.Parse(seasonStart + "-" + Clock.Today.Year.ToString());
			EndDate = DateTime.Parse(seasonEnd + "-" + Clock.Today.Year.ToString());
			
			//Can we irrigate at all?
			IrrigationIsAllowed = false; 
			if (allowIrrigation == answerType.yes)
				IrrigationIsAllowed = true; 

			//Calculate soil water variables
			double depthFromSurface = 0.0;
			double fracLayer = 0.0;
			nLayers = Soil.SoilWater.Thickness.Length;
			for (int layer = 0; layer < nLayers; layer++)
			{
				fracLayer = Math.Min(1.0, (depthPAWC - depthFromSurface) / Soil.SoilWater.Thickness[layer]);
				TopLL += Soil.SoilWater.LL15mm[layer] * fracLayer;
				TopDUL += Soil.SoilWater.DULmm[layer] * fracLayer;
				depthFromSurface += Soil.SoilWater.Thickness[layer];
				if (depthFromSurface >= depthPAWC)
					layer = nLayers;
			}
		}
	   	  
		//Determine daily requirement for irrigation
		[EventSubscribe("StartOfDay")]
		private void OnStartOfDay(object sender, EventArgs e)
		{
			//Can we irrigate today?		  
			SeasonIsOpen = isBetween(Clock.Today, StartDate, EndDate);

			//Is there a crop in the ground that needs irrigation?
			CropIsActive = false;
			if ((existingCrop != null) && (existingCrop.IsAlive))
				CropIsActive = true;
			//if ((existingCrop.Phenology.Stage >= 3.0) && (existingCrop.Phenology.Stage < 6.0))
	      
			//Is the irrigator available?
			IrrigatorIsAvailable = false;
			DaysSinceIrrigation += 1;
			if (DaysSinceIrrigation >= returndays)
				IrrigatorIsAvailable = true;
	      
			//Is the soil dry enough to require irrigation?
			SoilIsDry = false;
			double depthFromSurface = 0.0;
			double fracLayer = 0.0;
			TopSWC = 0.0;
			for (int layer = 0; layer < nLayers; layer++)
			//for (int layer = 0; depthFromSurface < depthPAWC + Soil.SoilWater.Thickness[layer]; layer++)
			{
				fracLayer = Math.Min(1.0, (depthPAWC - depthFromSurface) / Soil.SoilWater.Thickness[layer]);
				TopSWC += Soil.SoilWater.SWmm[layer] * fracLayer;
				depthFromSurface += Soil.SoilWater.Thickness[layer];
				if (depthFromSurface >= depthPAWC)
					layer = nLayers;
			}
			
			TopSWdeficit = TopSWC - TopDUL;
			if (Math.Max(0.0, -TopSWdeficit) >= (TopDUL - TopLL) * (100 - triggerDeficit) / 100)
				SoilIsDry = true;
	            
			//Are all the conditions ratifying irrigation
			if (IrrigationIsAllowed && SeasonIsOpen && CropIsActive && IrrigatorIsAvailable && SoilIsDry)
			{
				//Lets bloody well irrigate then!!!!
				AmountToApply = TopDUL * targetDeficit / 100 - TopSWC;
				AmountToApply = Math.Max(0.0, Math.Min(AmountToApply, seasonsAllocation - SeasonAppliedAmount));
				Irrigation.Apply(AmountToApply);
				DaysSinceIrrigation = 0;
				SeasonAppliedAmount += AmountToApply;
			}
		}
		
		///Checks whether theDate is between iniDate and endDate (non-year specific)
		private bool isBetween(DateTime theDay, DateTime iniDate, DateTime endDate)
		{
			bool result = false;
			if (iniDate.DayOfYear < endDate.DayOfYear)
			{
				// period is within one year, ex: summer in the northern hemisphere
				if ((theDay.DayOfYear >= iniDate.DayOfYear) && (theDay.DayOfYear <= endDate.DayOfYear))
					result = true;
			}
			else
			{
				// period goes over the end of the year, ex: summer in the southern hemisphere
				if ((theDay.DayOfYear >= iniDate.DayOfYear) || (theDay.DayOfYear <= endDate.DayOfYear))
					result = true;
			}
			
			return result;
		}
	}
}
```
          MicroClimate: a_interception=0; b_interception=1; c_interception=0; d_interception=0; soil_albedo=0.23; sun_angle=15; soil_heat_flux_fraction=0.4; night_interception_fraction=0.5; refheight=2; albedo=0.15; emissivity=0.96; RadIntTotal=0
          Irrigation
          Fertiliser
          SurfaceOrganicMatter: PondActive=no; ReportAdditions=no; ReportRemovals=no; PoolName=Sward; type=grass; mass=0; standing_fraction=0; cnr=15; CriticalResidueWeight=2000; OptimumDecompTemp=20; MaxCumulativeEOS=20; CNRatioDecompCoeff=0.277; CNRatioDecompThreshold=25; TotalLeachRain=25; MinRainToLeach=10; CriticalMinimumOrganicC=0.004; DefaultCPRatio=0; DefaultStandingFraction=0; StandingExtinctCoeff=0.5; FractionFaecesAdded=0.5
            Pools:
              {PoolName=Sward, ResidueType=grass, Mass=0, CNRatio=15, StandingFraction=0}
            ResidueTypes: LoadFromResource=ResidueTypes
            TillageTypes TillageTypesList
          Soil: LocalName=Stores lots of water; Site=Made up; Latitude=0; Longitude=0
            Analysis: PHUnits=Water; BoronUnits=HotWater
              Thickness  Rocks  PH  CEC  ParticleSizeSand  ParticleSizeSilt  ParticleSizeClay
              150        0      6   10   10                30                60
              150        0      6   10   10                30                60
              150        0      6   10   10                30                60
              150        0      6   10   10                30                60
            Water
              Thickness  BD   AirDry  LL15  DUL   SAT  KS
              150        1.3  0.05    0.1   0.45  0.5  500
              150        1.3  0.1     0.1   0.45  0.5  500
              150        1.3  0.1     0.1   0.45  0.5  500
              150        1.3  0.1     0.1   0.45  0.5  500
              SoilCrop RyegrassSoil: LL=[0.1, 0.1, 0.1, 0.1]; KL=[0.05, 0.05, 0.05, 0.05]; XF=[1, 1, 1, 1]
              SoilCrop WhiteCloverSoil: LL=[0.1, 0.1, 0.1, 0.1]; KL=[0.05, 0.05, 0.05, 0.05]; XF=[1, 1, 1, 1]
            SoilWater: SummerDate=1-Nov; SummerU=6; SummerCona=3.5; WinterDate=1-apr; WinterU=2; WinterCona=2; DiffusConst=88; DiffusSlope=35; Salb=0.13; CN2Bare=73; CNRed=20; CNCov=0.8; slope=0; discharge_width=0; catchment_area=0; max_pond=0; residueinterception=0
              Thickness  SWCON  KLAT
              150        0.3    0
              150        0.3    0
              150        0.3    0
              150        0.3    0
            SoilNitrogen: fom_type=[default, manure, mucuna, lablab, shemp, stable]; fract_carb=[0.2, 0.3, 0.54, 0.57, 0.45, 0]; fract_cell=[0.7, 0.3, 0.37, 0.37, 0.47, 0.1]; fract_lign=[0.1, 0.4, 0.09, 0.06, 0.08, 0.9]; wfpsN2N2O_x=[22, 88]; wfpsN2N2O_y=[0.1, 1]; oc=[3.71368, 2.46983, 1.2384, 0.49836]
            SoilOrganicMatter: RootCN=40; RootWt=1000; SoilCN=12; EnrACoeff=7.4; EnrBCoeff=0.2; OCUnits=Total
              Thickness  OC   FBiom  FInert
              150        3    0.04   0.5
              150        1    0.02   0.7
              150        0.6  0.02   0.83
              150        0.4  0.01   0.9
            InitialWater Initial water: PercentMethod=EvenlyDistributed; FractionFull=0.95
            Sample Initial nitrogen: NO3Units=ppm; NH4Units=ppm; SWUnits=Volumetric; OCUnits=Total; PHUnits=Water
              Thickness  NO3  NH4
              150        30   0
              150        30   0
              150        30   0
              150        30   0
            CERESSoilTemperature
          SoluteManager
          PastureSpecies Ryegrass: MaximumNUptake=10; Albedo=0.26; Gsmax=0.011; R50=200; SpeciesFamily=Grass; PhotosyntheticPathway=C3; InitialShootDM=2500; InitialRootDM=500; InitialRootDepth=600; ReferencePhotosyntheticRate=1; LightExtinctionCoefficient=0.5; GrowthTminimum=1; GrowthToptimum=20; GrowthTEffectExponent=1.7; UseHeatStressFactor=yes; HeatOnsetTemperature=28; HeatFullTemperature=35; HeatRecoverySumDD=30; HeatRecoveryTReference=25; UseColdStressFactor=yes; ColdOnsetTemperature=1; ColdFullTemperature=-5; ColdRecoverySumDD=25; ColdRecoveryTReference=0; MaintenanceRespirationCoefficient=0.03; GrowthRespirationCoefficient=0.25; RespirationTReference=20; RespirationExponent=1.5; NThresholdsForLeaves=[0.04, 0.012, 0.05]; NThresholdsForStems=[0.02, 0.006, 0.025]; NThresholdsForStolons=[0, 0, 0]; NThresholdsForRoots=[0.02, 0.006, 0.025]; DegreesDayForGermination=125; TargetShootRootRatio=4; MaxRootAllocation=0.25; ShootRootGlfFactor=0.5; UseReproSeasonFactor=yes; ReproSeasonReferenceLatitude=41; ReproSeasonTimingCoeff=0.14; ReproSeasonMaxAllocationIncrease=0.5; ReproSeasonAllocationCoeff=0.1; FractionLeafMaximum=0.7; FractionLeafMinimum=0.7; FractionLeafDMThreshold=500; FractionLeafDMFactor=2000; FractionLeafExponent=3; FractionToStolon=0; SpecificLeafArea=25; SpecificRootLength=100; StolonEffectOnLAI=0; ShootMaxEffectOnLAI=1000; MaxStemEffectOnLAI=1; LiveLeavesPerTiller=3; TissueTurnoverRateShoot=0.05; TissueTurnoverRateRoot=0.02; DetachmentRateShoot=0.08; TurnoverTemperatureMin=2; TurnoverTemperatureRef=20; TurnoverTemperatureExponent=1; TurnoverDroughtEffectMax=1; TurnoverDroughtThreshold=0.5; TurnoverDefoliationCoefficient=0.5; TurnoverDefoliationRootEffect=0.1; FractionNLuxuryRemobilisable=[0.1, 0.1, 0.1]; MinimumNFixation=0; MaximumNFixation=0; SoilSaturationEffectMax=0.1; MinimumWaterFreePorosity=-1; SoilSaturationRecoveryFactor=0.25; NDillutionCoefficient=0.25; GlfGeneric=1; GlfSoilFertility=1; PlantHeightMinimum=25; PlantHeightMaximum=600; PlantHeightMassForMax=10000; PlantHeightExponent=2.8; RootDepthMinimum=50; RootDepthMaximum=750; RootElongationRate=25; RootDistributionDepthParam=90; RootDistributionExponent=3.2; DigestibilitiesCellWall=[0.6, 0.6, 0.6, 0.2]; MinimumGreenWt=100; FractionStolonStanding=0; PreferenceForGreenOverDead=1; PreferenceForLeafOverStems=1; WaterAvailableMethod=DefaultAPSIM; NitrogenAvailableMethod=BasicAgPasture
          Report Results: EventNames=[Clock].EndOfDay
            VariableNames:
              [Clock].Today as Date
              [Ryegrass].AboveGroundWt as PlantMass
              [Ryegrass].HarvestedWt as Harvested
              [Ryegrass].WaterDemand as SW_Demand
              sum([Ryegrass].WaterUptake) as SW_Uptake
              [Ryegrass].GlfWaterSupply as glfWater
              [Ryegrass].GlfNSupply as glfNitrogen
              sum([Soil].SoilWater.SWmm) as SoilWater
              sum([Soil].SoilNitrogen.NH4)+sum([Soil].SoilNitrogen.NO3) as SoilNitrogen
        Zone Zone1: Area=1; Slope=0
          Report Results: EventNames=[Clock].EndOfDay
            VariableNames:
              [Clock].Today as Date
              sum([Soil].SoilWater.SWmm) as SoilWater
              sum([Soil].SoilNitrogen.NH4)+sum([Soil].SoilNitrogen.NO3) as SoilNitrogen
          SoluteManager
          SurfaceOrganicMatter: same as CheckMassBalanceWater.NumZonesWater.BaseWater.Zone0.SurfaceOrganicMatter
          Soil: same as CheckMassBalanceWater.NumZonesWater.BaseWater.Zone0.Soil
  Folder CheckMassBalanceNitrogen
    Experiment NumZonesNitrogen
      Factors
        Factor NumOfZones: Specifications=[DoRootsSingle].Script.Zone1Prop=0.0,0.1,0.25,0.5,1.0
      Simulation BaseNitrogen
        Clock: StartDate=2000-01-01; EndDate=2000-04-30
        Weather: FileName=ForeverSpringNoRain.met
        SoilArbitrator
        Summary
        Zone Zone0: Area=1; Slope=0
          Folder Managers
            Manager DoRootsSingle: same as CheckMassBalanceWater.NumZonesWater.BaseWater.Zone0.Managers.DoRootsSingle
            Manager CutRotationSingle: same as CheckMassBalanceWater.NumZonesWater.BaseWater.Zone0.Managers.CutRotationSingle
            Manager AutomaticFertiliser: same as CheckMassBalanceWater.NumZonesWater.BaseWater.Zone0.Managers.AutomaticFertiliser
            Manager AutomaticIrrigation
              allowIrrigation = yes
              seasonStart = 15-Aug
              seasonEnd = 30-May
              seasonsAllocation = 10000
              triggerDeficit = 99
              targetDeficit = 100
              returndays = 1
              maximumAmount = 5
              depthPAWC = 600
              script: same as in CheckMassBalanceWater.NumZonesWater.BaseWater.Zone0.Managers.AutomaticIrrigation
          MicroClimate: a_interception=0; b_interception=1; c_interception=0; d_interception=0; soil_albedo=0.23; sun_angle=15; soil_heat_flux_fraction=0.4; night_interception_fraction=0.5; refheight=2; albedo=0.15; emissivity=0.96; RadIntTotal=0
          Irrigation
          Fertiliser
          SurfaceOrganicMatter: same as CheckMassBalanceWater.NumZonesWater.BaseWater.Zone0.SurfaceOrganicMatter
          Soil: same as CheckMassBalanceWater.NumZonesWater.BaseWater.Zone0.Soil
          SoluteManager
          PastureSpecies Ryegrass: same as CheckMassBalanceWater.NumZonesWater.BaseWater.Zone0.Ryegrass
          Report Results: same as CheckMassBalanceWater.NumZonesWater.BaseWater.Zone0.Results
        Zone Zone1: Area=1; Slope=0
          Folder Managers
            Manager AutomaticFertiliser: same as CheckMassBalanceWater.NumZonesWater.BaseWater.Zone0.Managers.AutomaticFertiliser
            Manager AutomaticIrrigation: same as CheckMassBalanceNitrogen.NumZonesNitrogen.BaseNitrogen.Zone0.Managers.AutomaticIrrigation
          MicroClimate: a_interception=0; b_interception=1; c_interception=0; d_interception=0; soil_albedo=0.23; sun_angle=15; soil_heat_flux_fraction=0.4; night_interception_fraction=0.5; refheight=2; albedo=0.15; emissivity=0.96; RadIntTotal=0
          Irrigation
          Fertiliser
          SurfaceOrganicMatter: same as CheckMassBalanceWater.NumZonesWater.BaseWater.Zone0.SurfaceOrganicMatter
          Soil: same as CheckMassBalanceWater.NumZonesWater.BaseWater.Zone0.Soil
          SoluteManager
          Report Results: EventNames=[Clock].EndOfDay
            VariableNames:
              [Clock].Today as Date
              sum([Soil].SoilWater.SWmm) as SoilWater
              sum([Soil].SoilNitrogen.NH4)+sum([Soil].SoilNitrogen.NO3) as SoilNitrogen
  Folder AgP_3Zone_UnequalNitrogen
    Simulation ThreeZoneSim
      Clock: StartDate=2000-01-01; EndDate=2000-03-31
      Weather: FileName=ForeverSpringNoRain.met
      SoilArbitrator
      Summary
      Zone Zone0: Area=1; Slope=0
        Folder Managers
          Manager DoRootsThreeZone
            RootDepth = 600
            RootMass = 500
            Zone0Name = Zone0
            Zone0Prop = 0
            Zone2Name = Zone1
            Zone2Prop = 0.3
```csharp
// Defoliates AgPasture on a regular rotation or one-off via a schedule
// currenty defoliates the amount specified by spreading evenly over the specified period

using System;
using System.Collections.Generic;
using System.Xml.Serialization;
using Models.Core;
using Models.PMF;
using APSIM.Shared.Utilities;

namespace Models
{
	[Serializable]
	public class Script : Model
	{
		// - Links to APSIM models
		[Link] Zone myZone;
		[Link] Clock Clock;
		[Link] ISummary summary = null;
		
		List<AgPasture.PastureSpecies> Pasture = new List<AgPasture.PastureSpecies>();
		
		// - Paramters for this manager
		[Description("Root depth in the plant's zone (mm): ")]  public double RootDepth { get; set; }
		[Description("Root mass  in the plant's zone (mm): ")]  public double RootMass { get; set; }

		[Description("Name of zone ot the left: ")] public string Zone0Name { get; set; }
		[Description("Proportionate depth and mass in zone to the left (-): ")]  public double Zone0Prop { get; set; }

		[Description("Name of zone ot the right: ")] public string Zone2Name { get; set; }
		[Description("Proportionate depth and mass in zone to the right (-): ")]  public double Zone2Prop { get; set; }

		// - Outputs from this manager

		// - Internal variables

		[EventSubscribe("Commencing")]
		private void OnSimulationCommencing(object sender, EventArgs e)
		{
			int SpeciesNum = 0;
			foreach (AgPasture.PastureSpecies species in Apsim.Children(myZone, typeof(AgPasture.PastureSpecies)))
			{
				SpeciesNum += 1;
				if (SpeciesNum == 1)
				{
					if (Zone0Prop > 0)
						species.AddZone(zoneName: Zone0Name, rootDepth: Zone0Prop * RootDepth, rootDM: Zone0Prop * RootMass, specificRootLength: 100);
					if (Zone2Prop > 0)
						species.AddZone(zoneName: Zone2Name, rootDepth: Zone2Prop * RootDepth, rootDM: Zone2Prop * RootMass, specificRootLength: 100);
				}
			}

			//Pasture[1].AddZone(zoneName: "Zone1", rootDepth: 100, rootDM: 1000, specificRootLength: 100);
			//Pasture[1].AddZone(zoneName: "Zone2", rootDepth: 50, rootDM: 500, specificRootLength: 100);
		}
	}
}
```
          Manager CutRotationSingle: same as CheckMassBalanceWater.NumZonesWater.BaseWater.Zone0.Managers.CutRotationSingle
          Manager AutomaticFertiliser: same as CheckMassBalanceWater.NumZonesWater.BaseWater.Zone0.Managers.AutomaticFertiliser
          Manager AutomaticIrrigation: same as CheckMassBalanceNitrogen.NumZonesNitrogen.BaseNitrogen.Zone0.Managers.AutomaticIrrigation
        MicroClimate: a_interception=0; b_interception=1; c_interception=0; d_interception=0; soil_albedo=0.23; sun_angle=15; soil_heat_flux_fraction=0.4; night_interception_fraction=0.5; refheight=2; albedo=0.15; emissivity=0.96; RadIntTotal=0
        Irrigation
        Fertiliser
        SurfaceOrganicMatter: same as CheckMassBalanceWater.NumZonesWater.BaseWater.Zone0.SurfaceOrganicMatter
        Soil: LocalName=Stores lots of water; Site=Made up; Latitude=0; Longitude=0
          Analysis: same as CheckMassBalanceWater.NumZonesWater.BaseWater.Zone0.Soil.Analysis
          Water: same as CheckMassBalanceWater.NumZonesWater.BaseWater.Zone0.Soil.Water
          SoilWater: same as CheckMassBalanceWater.NumZonesWater.BaseWater.Zone0.Soil.SoilWater
          SoilNitrogen: same as CheckMassBalanceWater.NumZonesWater.BaseWater.Zone0.Soil.SoilNitrogen
          SoilOrganicMatter: RootCN=40; RootWt=1000; SoilCN=12; EnrACoeff=7.4; EnrBCoeff=0.2; OCUnits=Total
            Thickness  OC   FBiom  FInert
            150        3    0.04   0.5
            150        1    0.02   0.7
            150        0.6  0.02   0.83
            150        0.4  0.01   0.9
          InitialWater Initial water: PercentMethod=EvenlyDistributed; FractionFull=0.95
          Sample Initial nitrogen: NO3Units=ppm; NH4Units=ppm; SWUnits=Volumetric; OCUnits=Total; PHUnits=Water
            Thickness  NO3  NH4
            150        25   0
            150        25   0
            150        25   0
            150        25   0
          CERESSoilTemperature
        SoluteManager
        PastureSpecies Ryegrass: same as CheckMassBalanceWater.NumZonesWater.BaseWater.Zone0.Ryegrass
        Report Results: same as CheckMassBalanceWater.NumZonesWater.BaseWater.Zone0.Results
      Zone Zone1: Area=1; Slope=0
        Folder Managers
          Manager DoRootsThreeZone
            RootDepth = 600
            RootMass = 500
            Zone0Name = Zone0
            Zone0Prop = 0.1
            Zone2Name = Zone2
            Zone2Prop = 0.3
            script: same as in AgP_3Zone_UnequalNitrogen.ThreeZoneSim.Zone0.Managers.DoRootsThreeZone
          Manager CutRotationSingle: same as CheckMassBalanceWater.NumZonesWater.BaseWater.Zone0.Managers.CutRotationSingle
          Manager AutomaticFertiliser: same as CheckMassBalanceWater.NumZonesWater.BaseWater.Zone0.Managers.AutomaticFertiliser
          Manager AutomaticIrrigation: same as CheckMassBalanceNitrogen.NumZonesNitrogen.BaseNitrogen.Zone0.Managers.AutomaticIrrigation
        MicroClimate: a_interception=0; b_interception=1; c_interception=0; d_interception=0; soil_albedo=0.23; sun_angle=15; soil_heat_flux_fraction=0.4; night_interception_fraction=0.5; refheight=2; albedo=0.15; emissivity=0.96; RadIntTotal=0
        Irrigation
        Fertiliser
        SurfaceOrganicMatter: same as CheckMassBalanceWater.NumZonesWater.BaseWater.Zone0.SurfaceOrganicMatter
        Soil: same as AgP_3Zone_UnequalNitrogen.ThreeZoneSim.Zone0.Soil
        SoluteManager
        PastureSpecies Ryegrass: same as CheckMassBalanceWater.NumZonesWater.BaseWater.Zone0.Ryegrass
        Report Results: same as CheckMassBalanceWater.NumZonesWater.BaseWater.Zone0.Results
      Zone Zone2: Area=1; Slope=0
        Folder Managers
          Manager DoRootsThreeZone
            RootDepth = 600
            RootMass = 500
            Zone0Name = Zone1
            Zone0Prop = 0.3
            Zone2Name = Zone2
            Zone2Prop = 0
            script: same as in AgP_3Zone_UnequalNitrogen.ThreeZoneSim.Zone0.Managers.DoRootsThreeZone
          Manager CutRotationSingle: same as CheckMassBalanceWater.NumZonesWater.BaseWater.Zone0.Managers.CutRotationSingle
          Manager AutomaticFertiliser: same as CheckMassBalanceWater.NumZonesWater.BaseWater.Zone0.Managers.AutomaticFertiliser
          Manager AutomaticIrrigation: same as CheckMassBalanceNitrogen.NumZonesNitrogen.BaseNitrogen.Zone0.Managers.AutomaticIrrigation
        MicroClimate: a_interception=0; b_interception=1; c_interception=0; d_interception=0; soil_albedo=0.23; sun_angle=15; soil_heat_flux_fraction=0.4; night_interception_fraction=0.5; refheight=2; albedo=0.15; emissivity=0.96; RadIntTotal=0
        Irrigation
        Fertiliser
        SurfaceOrganicMatter: same as CheckMassBalanceWater.NumZonesWater.BaseWater.Zone0.SurfaceOrganicMatter
        Soil: same as AgP_3Zone_UnequalNitrogen.ThreeZoneSim.Zone0.Soil
        SoluteManager
        PastureSpecies Ryegrass: same as CheckMassBalanceWater.NumZonesWater.BaseWater.Zone0.Ryegrass
        Report Results: same as CheckMassBalanceWater.NumZonesWater.BaseWater.Zone0.Results
  Folder Slurp_3Zone_UnequalNitrogen
    Simulation ThreeZoneSimSlurp
      Clock: StartDate=2000-01-01; EndDate=2000-03-31
      ControlledEnvironment: MaxT=25; MinT=15; Rain=0; Radn=25; PanEvap=0; VP=17; Wind=3; CO2=350; AirPressure=1010; Latitude=0; DayLength=12
      SoilArbitrator
      Summary
      Zone Zone0: Area=1; Slope=0
        Folder Managers
          Manager SlurpSowingRule
            CultivarName = StaticCrop
            InitialRootDepth = 600
            SowingDate = 1998-10-14
```csharp
using System;
using Models.Core;
using Models.PMF;
using APSIM.Shared.Utilities;
        
namespace Models
{
	[Serializable] 
	[System.Xml.Serialization.XmlInclude(typeof(Model))]
	public class Script : Model
	{
		[Link] Plant Slurp;
		[Link] Clock Clock;

		[Description("Cultivar")]
		public string CultivarName { get; set; }
		[Description("Initial Root Depth")]
		public double InitialRootDepth { get; set; }
		[Description("Sowing Date")]
		public DateTime SowingDate { get; set; }

               
		[EventSubscribe("DoManagement")]
		private void OnDoManagement(object sender, EventArgs e)
		{
			if (Clock.Today.Date == SowingDate)
				Slurp.Sow(cultivar: CultivarName, population: 1, depth: InitialRootDepth, rowSpacing: 150);
			//Potato.Sow(... Contains the following arguements:
			//Population  double  Optional  Seeds sowing/m2.  Default is zero
			//Cultivar    string  Required  "NameOfCultivar"
			//Depth       double  Optional  Depth (mm) seed sown.   Default is 100mm 
			//MaxCover    double  Optional  Proportion (0-1) of the ground row crop will cover.   Default is 1.0
			//BudNumber   double  Optional  Number of mainstems per seed sown.  Default is 1.0
			//RowSpacing  double  Optional  Spaceing (mm) between drill rows when crop is sown.  Default is 150mm
			//CropClass   string  Optional  Crop class to instantiate when crop is sown.  Default is "Plant"
		}
	}
}
```
          Manager DoRootsThreeZone_Slurp
            RootDepth = 600
            RootMass = 500
            Zone0Name = Zone0
            Zone0Prop = 0
            Zone2Name = Zone1
            Zone2Prop = 0.3
```csharp
// Defoliates AgPasture on a regular rotation or one-off via a schedule
// currenty defoliates the amount specified by spreading evenly over the specified period

using System;
using System.Collections.Generic;
using System.Xml.Serialization;
using Models.Core;
using Models.PMF;
using APSIM.Shared.Utilities;

namespace Models
{
	[Serializable]
	public class Script : Model
	{
		// - Links to APSIM models
		[Link] Zone myZone;
		[Link] Clock Clock;
		[Link] ISummary summary = null;
		[Link] Plant Slurp;
		
		//List<AgPasture.PastureSpecies> Pasture = new List<AgPasture.PastureSpecies>();

		// - Paramters for this manager
		[Description("Root depth in the plant's zone (mm): ")]  public double RootDepth { get; set; }
		[Description("Root mass  in the plant's zone (mm): ")]  public double RootMass { get; set; }

		[Description("Name of zone ot the left: ")] public string Zone0Name { get; set; }
		[Description("Proportionate depth and mass in zone to the left (-): ")]  public double Zone0Prop { get; set; }

		[Description("Name of zone ot the right: ")] public string Zone2Name { get; set; }
		[Description("Proportionate depth and mass in zone to the right (-): ")]  public double Zone2Prop { get; set; }

		// - Outputs from this manager

		// - Internal variables

		[EventSubscribe("Commencing")]
		private void OnSimulationCommencing(object sender, EventArgs e)
		{
			int SpeciesNum = 0;

			if (Zone0Prop > 0)
			{
				Slurp.Root.ZoneNamesToGrowRootsIn.Add(Zone0Name);
				Slurp.Root.ZoneRootDepths.Add(Zone0Prop * RootDepth);
				Slurp.Root.ZoneInitialDM.Add(Zone0Prop * RootMass);
			}
			if (Zone2Prop > 0)
			{
				Slurp.Root.ZoneNamesToGrowRootsIn.Add(Zone2Name);
				Slurp.Root.ZoneRootDepths.Add(Zone2Prop * RootDepth);
				Slurp.Root.ZoneInitialDM.Add(Zone2Prop * RootMass);
			}

			/*foreach (AgPasture.PastureSpecies species in Apsim.Children(myZone, typeof(AgPasture.PastureSpecies)))
			{
				SpeciesNum += 1;
				if (SpeciesNum == 1)
				{
					if (Zone0Prop > 0)
						species.AddZone(zoneName: Zone0Name, rootDepth: Zone0Prop * RootDepth, rootDM: Zone0Prop * RootMass, specificRootLength: 100);
					if (Zone2Prop > 0)
						species.AddZone(zoneName: Zone2Name, rootDepth: Zone2Prop * RootDepth, rootDM: Zone2Prop * RootMass, specificRootLength: 100);
				}
			} */

			//Pasture[1].AddZone(zoneName: "Zone1", rootDepth: 100, rootDM: 1000, specificRootLength: 100);
			//Pasture[1].AddZone(zoneName: "Zone2", rootDepth: 50, rootDM: 500, specificRootLength: 100);
		}
	}
}
```
          Manager AutomaticFertiliser: same as CheckMassBalanceWater.NumZonesWater.BaseWater.Zone0.Managers.AutomaticFertiliser
          Manager AutomaticIrrigation: same as CheckMassBalanceNitrogen.NumZonesNitrogen.BaseNitrogen.Zone0.Managers.AutomaticIrrigation
        MicroClimate: a_interception=0; b_interception=1; c_interception=0; d_interception=0; soil_albedo=0.23; sun_angle=15; soil_heat_flux_fraction=0.4; night_interception_fraction=0.5; refheight=2; albedo=0.15; emissivity=0.96; RadIntTotal=0
        Irrigation
        Fertiliser
        SurfaceOrganicMatter: same as CheckMassBalanceWater.NumZonesWater.BaseWater.Zone0.SurfaceOrganicMatter
        Soil: LocalName=Stores lots of water; Site=Made up; Latitude=0; Longitude=0
          Analysis: same as CheckMassBalanceWater.NumZonesWater.BaseWater.Zone0.Soil.Analysis
          Water
            Thickness  BD   AirDry  LL15  DUL   SAT  KS
            150        1.3  0.05    0.1   0.45  0.5  500
            150        1.3  0.1     0.1   0.45  0.5  500
            150        1.3  0.1     0.1   0.45  0.5  500
            150        1.3  0.1     0.1   0.45  0.5  500
            SoilCrop RyegrassSoil: LL=[0.1, 0.1, 0.1, 0.1]; KL=[0.05, 0.05, 0.05, 0.05]; XF=[1, 1, 1, 1]
            SoilCrop WhiteCloverSoil: LL=[0.1, 0.1, 0.1, 0.1]; KL=[0.05, 0.05, 0.05, 0.05]; XF=[1, 1, 1, 1]
            SoilCrop SlurpSoil: LL=[0.1, 0.1, 0.1, 0.1]; KL=[0.05, 0.05, 0.05, 0.05]; XF=[1, 1, 1, 1]
          SoilWater: same as CheckMassBalanceWater.NumZonesWater.BaseWater.Zone0.Soil.SoilWater
          SoilNitrogen: same as CheckMassBalanceWater.NumZonesWater.BaseWater.Zone0.Soil.SoilNitrogen
          SoilOrganicMatter: RootCN=40; RootWt=1000; SoilCN=12; EnrACoeff=7.4; EnrBCoeff=0.2; OCUnits=Total
            Thickness  OC   FBiom  FInert
            150        3    0.04   0.5
            150        1    0.02   0.7
            150        0.6  0.02   0.83
            150        0.4  0.01   0.9
          InitialWater Initial water: PercentMethod=EvenlyDistributed; FractionFull=0.95
          Sample Initial nitrogen: NO3Units=ppm; NH4Units=ppm; SWUnits=Volumetric; OCUnits=Total; PHUnits=Water
            Thickness  NO3  NH4
            150        25   0
            150        25   0
            150        25   0
            150        25   0
          CERESSoilTemperature
        SoluteManager
        Plant Slurp: CropType=Slurp
          Memo TitlePage
            # SLURP: the Sound of a crop using water

            This model has been built using the Plant Modelling Framework (PMF) of [brown_plant_2014] to provide a simple representation of crops.  It is usefull for water and nitrogen balance studies where the focus is on soil processes and a very simple crop is adequate.  The model does not predict crop growth, development or yields.  It simply takes up water and nitrogen.   .

            SLURP has no phenology so the behaviour of the SLURP is the same throughout its ontology (with the exception of root depth being able to increase).  SLURP consists of 2 organs:
               1. Leaf which ls represented with a Simpleleaf class and provides a Water uptake demand to the soil arbitrator.
               2. Root which extracts water and nitrogen from the soil for plant growth

            ##Inclusion in APSIM simulations
            A Slurp crop is included in a simulation the same as any other APSIM crop
             * The Slurp object needs to be dragged or copied from the Crop folder in the tool box into the field of your simulation.
             * It is then planted with a sowing rule
            <pre><code class='language-cs'>
            Slurp.Sow(cultivar: StaticCrop, population: 1, depth: 10, rowSpacing: 150);
            </code></pre>
              * Note that SLURP has no notion of population or rowSpacing but these parameters are required by the Sow method so filler values are provided
              * depth in the Sow arguement is the depth that the crop is sown at.  While this has no effect on emergence in SLURP it sets the depth that the root system is initialised at.  For static crops this depth should be set to the rooting depth that is expected as roots will not grow during the simulation

            ##Altering Slurp properties during runs
            In some cases users will wish to change properties of Slurp while the simulation is running.  This can be done using a the set method in a manager script.

            <pre><code class='language-cs'>
            object LAIResetValue = leaflai;
            zone.Set("Slurp.Leaf.LAIFunction.FixedValue", LAIResetValue);
            object HeightResetValue = CoverToday * MaximumHeight;
            zone.Set("Slurp.Leaf.HeightFunction.FixedValue", HeightResetValue);
            </code></pre>
          OrganArbitrator Arbitrator
            RelativeAllocation NArbitrator
            RelativeAllocation DMArbitrator
          Root: GrowthRespiration=0; MaintenanceRespiration=0
            CompositeBiomass Live: Propertys=[[Root].LayerLive]
            CompositeBiomass Dead: Propertys=[[Root].LayerDead]
            MultiplyFunction RootFrontVelocity
              AirTemperatureFunction TemperatureEffect
                XYPairs: X=[0, 26, 35]; Y=[1, 1, 1]
              Constant Potential: FixedValue=5; Units=mm/d
            Constant MaxDailyNUptake: FixedValue=100; Units=g/m2
            Constant MaximumRootDepth: FixedValue=1000; Units=mm
            Constant NitrogenDemandSwitch: FixedValue=1; Units=0-1
            Constant MaximumNConc: FixedValue=0.01
            Constant MinimumNConc: FixedValue=0.01
            LinearInterpolationFunction KLModifier: XProperty=[Root].LayerMidPointDepth
              XYPairs: X=[0, 400, 1500]; Y=[1, 1, 0]
              Memo Description
                This is important in SLURP as it is set for each species to represent their differences in rooting patterns between crop species
            Constant InitialDM: FixedValue=50; Units=g/plant
            Constant SenescenceRate: FixedValue=0; Units=/d
            Constant PartitionFraction: FixedValue=0.2; Units=0-1
            Constant SpecificRootLength: FixedValue=40; Units=m/g
            LinearInterpolationFunction KNO3: XProperty=[Root].LengthDensity
              XYPairs: X=[0, 0.003]; Y=[0.02, 0.02]
            LinearInterpolationFunction KNH4: XProperty=[Root].LengthDensity
              XYPairs: X=[0, 0.003]; Y=[0, 0]
            BiomassRemoval BiomassRemovalDefaults
              OrganBiomassRemovalType Harvest: FractionLiveToRemove=0; FractionDeadToRemove=0; FractionLiveToResidue=0; FractionDeadToResidue=0
              OrganBiomassRemovalType Cut: FractionLiveToRemove=0; FractionDeadToRemove=0; FractionLiveToResidue=0; FractionDeadToResidue=0
              OrganBiomassRemovalType Prune: FractionLiveToRemove=0; FractionDeadToRemove=0; FractionLiveToResidue=0; FractionDeadToResidue=0
              OrganBiomassRemovalType Graze: FractionLiveToRemove=0; FractionDeadToRemove=0; FractionLiveToResidue=0; FractionDeadToResidue=0
            LinearInterpolationFunction NUptakeSWFactor: XProperty=[Root].RWC
              XYPairs: X=[0, 1]; Y=[1, 1]
          SimpleLeaf Leaf: CohortsInitialised=false; Albedo=0.018; Gsmax=0.01; R50=200; MicroClimatePresent=true
            zero: TipsAtEmergence, CohortsAtInitialisation, InitialisedCohortNo, AppearedCohortNo, PlantAppearedLeafNo, LAI, Height, FRGR, PotentialEP, KDead, LAIDead
            Biomass Live
            Biomass Dead
            Constant DetachmentRateFunction: FixedValue=0; Units=/d
            MultiplyFunction InitialWtFunction
              Constant InitialPlantWt: FixedValue=0; Units=g/plant
              VariableReference Population: VariableName=[Plant].Population
            Constant LaiDeadFunction: FixedValue=0; Units=m^2/m^2
            Constant Photosynthesis: FixedValue=5; Units=g/m2/d
            AirTemperatureFunction FRGRFunction
              XYPairs: X=[0, 10, 25, 40]; Y=[0, 1, 1, 0]
            PartitionFractionDemandFunction DMDemandFunction
              Constant PartitionFraction: FixedValue=1; Units=0-1
            Constant MaximumNConc: FixedValue=0.05; Units=g/g
            Constant MinimumNConc: FixedValue=0.05; Units=g/g
            Constant LAIFunction: FixedValue=0.5; Units=m2/m2
            Constant ExtinctionCoefficientFunction: FixedValue=0.7
            Constant StructuralFraction: FixedValue=0.5; Units=0-1
            Constant HeightFunction: FixedValue=400; Units=mm
            Constant NReallocationFactor: FixedValue=0
            Constant SenescenceRate: FixedValue=0
            BiomassRemoval BiomassRemovalDefaults: same as Slurp_3Zone_UnequalNitrogen.ThreeZoneSimSlurp.Zone0.Slurp.Root.BiomassRemovalDefaults
            Constant MaintenanceRespirationFunction: FixedValue=0; Units=0-1
            Constant DMConversionEfficiency: FixedValue=1; Units=0-1
          Cultivar StaticCrop
            Memo Description
              The static crop is the base crop and uses all the paramaters values specified above.
          Cultivar StaticTree
            Command:
              [Root].MaximumRootDepth.FixedValue = 2600
              [Leaf].ExtinctionCoefficientFunction.FixedValue = 0.65
              [Leaf].HeightFunction.FixedValue = 5000
              [Root].KLModifier.XYPairs.X = 0, 400, 500, 1000, 1500, 2000
              [Root].KLModifier.XYPairs.Y = 1, 1, 0.9, 0.6, 0.3, 0.1
            Memo Description
              The static tree is similar to the static crop but is taller, has a deeper root system and a lower extinction coefficient
          Cultivar Pasture
            Command:
              [Root].MaximumRootDepth.FixedValue = 800
              [Root].RootFrontVelocity.Potential.FixedValue = 15
              [Leaf].ExtinctionCoefficientFunction.FixedValue = 0.65
              [Root].KLModifier.XYPairs.X = 0, 200, 500, 1000
              [Root].KLModifier.XYPairs.Y = 1, 1, 0.7, 0.0
            Memo Description
              The pasture differs from the base crop because its has a RootFrontVelocity of 15 (as opposed to zero) which means the roots grow downward from sowing untill the MaximumRootDepth is reached.  It ExtinctionCoefficient and MaximumRootDepth are different to the base StaticCrop and it has a different pattern of kl with depth.
          Cultivar Lucerne
            Command:
              [Root].MaximumRootDepth.FixedValue = 2500
              [Root].RootFrontVelocity.Potential.FixedValue = 15
              [Leaf].ExtinctionCoefficientFunction.FixedValue = 0.8
              [Root].KLModifier.XYPairs.X = 0, 200, 500, 1000, 1500, 2000
              [Root].KLModifier.XYPairs.Y = 1, 1, 0.9, 0.6, 0.3, 0.1
            Memo Description
              Lucerne also grows root depth like pasture but has a greater root depth, different kl pattern and different extinction coefficient
        Report Results: same as CheckMassBalanceWater.NumZonesWater.BaseWater.Zone0.Results
      Zone Zone1: same as AgP_3Zone_UnequalNitrogen.ThreeZoneSim.Zone1
      Zone Zone2: same as AgP_3Zone_UnequalNitrogen.ThreeZoneSim.Zone2
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